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/COM,ANSYS RELEASE Release 19.1      BUILD 19.1      UP20180418       09:51:26
/PREP7
/TITLE,PyAnsysDebug
*IF,_CDRDOFF,EQ,1,THEN     !if solid model was read in
_CDRDOFF=             !reset flag, numoffs already performed
*ELSE              !offset database for the following FE model
NUMOFF,NODE,     4961
NUMOFF,ELEM,     1000
NUMOFF,TYPE,        1
*ENDIF
*SET,ANSINTER_,  2.000000000000
*SET,_BUTTON ,  1.000000000000
*SET,_GUI_CLR_BG,' systemButtonFace               '
*SET,_GUI_CLR_FG,' systemButtonText               '
*SET,_GUI_CLR_INFOBG,' systemInfoBackground           '
*SET,_GUI_CLR_SEL,' systemHighlight                '
*SET,_GUI_CLR_SELBG,' systemHighlight                '
*SET,_GUI_CLR_SELFG,' systemHighlightText            '
*SET,_GUI_CLR_WIN,' systemWindow                   '
*SET,_GUI_FNT_FMLY,'Arial                           '
*SET,_GUI_FNT_PXLS,  16.00000000000
*SET,_GUI_FNT_SLNT,'r                               '
*SET,_GUI_FNT_WEGT,'medium                          '
*SET,_REMOTE_IP,'localhost                       '
*SET,_RETURN ,  0.000000000000
*SET,_STATUS ,  0.000000000000
*SET,_UIQR   ,  1.000000000000
*SET,_WALLSTRT,  9.845000000000
*SET,_WB_PROJECTSCRATCH_DIR(1,       1,       1),''
*SET,_WB_SOLVERFILES_DIR(1,       1,       1),''
*SET,_WB_USERFILES_DIR(1,       1,       1),''
*SET,_Z1     ,  0.000000000000
*SET,_Z2     ,  0.000000000000
DOF,DELETE
ET,        1,200
KEYOP,        1, 1,       11
NBLOCK,6,SOLID,      4961,      4961
(3i9,6e21.13e3)
        1        0        0 1.0000000000000E-001 9.0000000000000E-001 9.0000000000000E-001
        2        0        0 1.0000000000000E-001 8.0000000000000E-001 9.0000000000000E-001
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N,R5.3,LOC,       -1,
EBLOCK,19,SOLID,      1000,      1000
(19i9)
        1        1        1        1        0        0        0        0       20        0        1        1     1150     1133     1042      810     1223     1132     1131
     1337     4595     4424     1336     3941     4593     4591     3940     1335     4637     4592     4423
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       -1
CMBLOCK,V_BLOCK ,ELEM,       2  ! users element component definition
(8i10)
         1     -1000
CMBLOCK,XY1     ,NODE,     341  ! users node component definition
(8i10)
       892       893       894       895       896       897       898       899
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CMBLOCK,XY2     ,NODE,     341  ! users node component definition
(8i10)
       911       912       913       914       915       916       917       918
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CMBLOCK,XZ1     ,NODE,     341  ! users node component definition
(8i10)
       811       812       813       814       815       816       817       818
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CMBLOCK,XZ2     ,NODE,     341  ! users node component definition
(8i10)
       730       731       732       733       734       735       736       737
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CMBLOCK,YZ1     ,NODE,     341  ! users node component definition
(8i10)
       901       902       903       904       905       906       907       908
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CMBLOCK,YZ2     ,NODE,     341  ! users node component definition
(8i10)
       921       922       923       924       925       926       927       928
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EXTOPT,ATTR,      0,      0,      0
EXTOPT,ESIZE,  0,  0.0000
EXTOPT,ACLEAR,      0
TREF,  0.00000000
IRLF,  0
BFUNIF,TEMP,_TINY
ACEL,  0.00000000    ,  0.00000000    ,  0.00000000
OMEGA,  0.00000000    ,  0.00000000    ,  0.00000000
DOMEGA,  0.00000000    ,  0.00000000    ,  0.00000000
CGLOC,  0.00000000    ,  0.00000000    ,  0.00000000
CGOMEGA,  0.00000000    ,  0.00000000    ,  0.00000000
DCGOMG,  0.00000000    ,  0.00000000    ,  0.00000000

KUSE,     0
TIME,  0.00000000
ALPHAD,  0.00000000
BETAD,  0.00000000
DMPRAT,  0.00000000
DMPSTR,  0.00000000
CRPLIM, 0.100000000    ,   0
CRPLIM,  0.00000000    ,   1
NCNV,     1,  0.00000000    ,     0,  0.00000000    ,  0.00000000

NEQIT,     0

ERESX,DEFA
FINISH
