**
** ABAQUS Input Deck Generated by HyperMesh Version  : 2019.1.0.20
** Generated using HyperMesh-Abaqus Template Version : 2019.1.0.20
**
**   Template:  ABAQUS/STANDARD 3D
**
*Part, name=PART-1-1
*NODE
         1,  2.127974088E-15,  -0.974065931336
         2,  0.2581626372515,  -1.128261020266
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**HWCOLOR COMP          2    11
*ELEMENT,TYPE=CPS3,ELSET=WingElset
         1,         2,       223,         1
        11,       227,       220,       221
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**HWCOLOR COMP          2    11
*ELEMENT,TYPE=CPS4,ELSET=WingElset
         2,         2,         3,       224,       223
         3,         1,       223,       225,       222
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**HM_PROP_ID          1
*Elset, elset=WingElset, generate
 1,965,1
** Section
*Shell Section, ELSET=WingElset, Material=material1
10.0      ,
*End Part
**
** MATERIALS
**
*Material, name=material1
*DENSITY
10.0      ,0.0
*ELASTIC, TYPE = ISOTROPIC
2.1000E+09,0.3       ,0.0
**
*Nset, nset=_PICKEDSET205, internal, instance=PART-1-1
  1, 2, 3, 219, 220, 221, 222
*Nset, nset=SET-191, instance=PART-1-1
 110,
**HMNAME MATS          1 material1     6
**HWNAME LOADCOL          1 auto2
**HWCOLOR LOADCOL          1    17
*BOUNDARY
_PICKEDSET205, ENCASTRE
*Step,
*Cload
SET-191, 1, 100.
*End Step
